@DSL Implicit;
@Behaviour FCCMericCailletaudSingleCrystalRateIndependentPlasticity2D;
@Author Jean-Michel Scherer;
@Date 18 / 03 / 2022;
@Description {
}

//@GenerateMTestFileOnFailure true;
@ModellingHypothesis PlaneStrain; //Tridimensional;
@OrthotropicBehaviour<Pipe>;

@Algorithm NewtonRaphson;
@Epsilon 1.e-9;
@MaximumNumberOfIterations 200;
@Theta 1;

@Brick StandardElasticity{
/*
  young_modulus: 1.0,
  poisson_ratio: 0.3
*/
  young_modulus1 : 1.,
  young_modulus2 : 1.,
  young_modulus3 : 1.,
  poisson_ratio12 : 0.3,
  poisson_ratio23 : 0.3,
  poisson_ratio13 : 0.3,
  shear_modulus12 : 0.384615384615385,
  shear_modulus23 : 0.384615384615385,
  shear_modulus13 : 0.384615384615385
};

@CrystalStructure FCC;
@SlipSystem<0, 1, -1>{1, 1, 1};
//@InteractionMatrix{1, 1, 0.6, 1.8, 1.6, 12.3, 1.6};
@InteractionMatrix{1, 0., 0., 0., 0., 0., 0.};

//@Parameter n = 1.; //10.0;
//@Parameter K = 1.; //25.;
//@Parameter Q = 0.; //11.43;
//@Parameter b = 0.; //2.1;
//@Parameter tau0 = 1.; //66.62;
//@Parameter d = 0.; //494.0;
//@Parameter C = 0.; //14363;

@MaterialProperty real n;
@MaterialProperty real K;
@MaterialProperty real Q;
@MaterialProperty real b;
@MaterialProperty real tau0;
@MaterialProperty real d;
@MaterialProperty real C;
@MaterialProperty real m0;

//@IntegrationVariable strain g[Nss];
@StateVariable strain g[Nss];
g.setEntryName("ViscoplasticSlip");

@AuxiliaryStateVariable strain p[Nss];
p.setEntryName("EquivalentViscoplasticSlip");

@AuxiliaryStateVariable strain a[Nss];
a.setEntryName("BackStrain");

@LocalVariable strain dPsi_d;

@AuxiliaryStateVariable strain Psi_pl;
Psi_pl.setEntryName("DissipatedEnergy");

@AuxiliaryStateVariable Stensor epl;
epl.setGlossaryName("PlasticStrain");

@Parameter real kres = 1e-5;
kres.setEntryName("ResidualStiffness");

@ExternalStateVariable real damage;
damage.setGlossaryName("Damage");

@AuxiliaryStateVariable strain lambda;
lambda.setEntryName("lambda");

@Parameter real rate_independent_tol = 1e-3;
rate_independent_tol.setEntryName("ResidualIndependentTolerance");

//@LocalVariable strain dg_[Nss];
//@LocalVariable strain ddg;
@LocalVariable strain fmax;

@InitLocalVariables{
  lambda = 1.;
  //ddg = 0.;
}

@Integrator {
  using size_type = unsigned short;
  const auto& ss = FCCMericCailletaudSingleCrystalRateIndependentPlasticity2DSlipSystems<real>::getSlipSystems();
  const auto& m = ss.him;
  //constexpr const auto eeps = 1.e-12;
  //const auto seps = eeps * D(0, 0);
  real exp_bp[Nss];
  for (size_type i = 0; i != Nss; ++i) {
      const auto p_ = p[i] + theta * abs(dg[i]);
      exp_bp[i] = exp(-b * p_);
  }
  dPsi_d = 0.;
  epl = 0. * Stensor::Id();
  //ddg = 0.;
  fmax = 0.;
  for (size_type i = 0; i != Nss; ++i) {
    stensor<3,real> sig3D = {sig(0),sig(1),sig(2),sig(3),0.,0.};
    const auto tau = sig3D | ss.mus[i];
    auto r = tau0;
    for (size_type j = 0; j != Nss; ++j) {
      r += Q * m(i, j) * (1 - exp_bp[j]);
    }
    const auto da =  //
        (dg[i] - d * a[i] * abs(dg[i])) / (1 + theta * d * abs(dg[i]));
    const auto x = C * (a[i] + theta * da);
    const auto f = max(abs(tau - x) - r, stress(0));
//    if (f > (1.1 * K / lambda)) {
//cout << "FALSE" << endl;
//      return false;
//    }
    const auto sgn = tau - x > 0 ? 1 : -1;
    // elasticity
    stensor<2,real> mu2D = {ss.mus[i](0),ss.mus[i](1),ss.mus[i](2),ss.mus[i](3)};
    feel += dg[i] * mu2D;
    dfeel_ddg(i) = mu2D;
    // viscoplasticity
    const auto v = lambda * pow(f / K, n);
    //const auto dv = lambda * n * v / (max(f, seps));
    const auto dv = lambda * (n / K) * pow(f / K, n - 1);
    fg[i] -= dt * v * sgn;
    dfg_ddeel(i) = -dt * dv * theta * (mu2D | D);
    const auto sgn_gi = dg(i) > 0 ? 1 : -1;
    const auto dda_ddg =
        (1 - d * a[i] * sgn_gi) / (power<2>(1 + theta * d * abs(dg[i])));
    dfg_ddg(i, i) += dt * dv * C * theta * dda_ddg;
    for (size_type j = 0; j != Nss; ++j) {
      const auto sgn_gj = dg(j) > 0 ? 1 : -1;
      const auto dr = Q * m(i, j) * theta * b * exp_bp[j] * sgn_gj;
      dfg_ddg(i, j) += dt * dv * dr * sgn;
    }
    dPsi_d += tau * dg[i];
    epl = g[i] * mu2D;
    //ddg += (dg_[i] - dg[i])*(dg_[i] - dg[i]);
    //dg_[i] = dg[i];
    fmax = max(f,fmax);
//cout << "fg = " << fg[i] << endl;
  }
  //ddg = sqrt(ddg) / Nss;
//cout << "feel = " << feel << endl;
}

@AdditionalConvergenceChecks{
//cout << "lambda = " << lambda << endl;
//cout << "ddg = " << ddg << endl;
//cout << "sum_f = " << sum_f << endl;
//cout << "converged: " << converged << endl;
//cout << "lambda: " << lambda << endl;
  if (converged) {
    //if ((ddg < 1.e-8) and (sum_f<1.e-4)) {
    if ((fmax<rate_independent_tol*tau0)) {
      converged = true;
    } else {
      lambda = m0*lambda;
      converged = false;
    }
  }
}

@UpdateAuxiliaryStateVariables {
  using size_type = unsigned short;
  for (size_type i = 0; i != Nss; ++i) {
    p[i] += abs(dg[i]);
    const auto da =  //
        (dg[i] - d * a[i] * abs(dg[i])) / (1 + theta * d * abs(dg[i]));
    a[i] += da;
  }
  const auto gd = (1-damage) * (1-damage) + kres;
  sig = gd * sig;
  Psi_pl += dPsi_d;
}

@TangentOperator{
  const auto gd = (1-damage) * (1-damage) + kres;
  Stensor4 iJe;
  getPartialJacobianInvert(iJe);
  Dt = gd * D * iJe;
//  if (dPsi_d > 1.e-6) {
//cout << Dt << endl;
//  }
}

@DissipatedEnergy{
  Psi_d += dPsi_d;
}

@InternalEnergy {
  const auto gd = (1 - damage) * (1 - damage) + kres;
  Psi_s = (0.5 / gd) * (sig | eel);
}
