@DSL Implicit;
@Behaviour HCPMericCailletaudSingleCrystalViscoPlasticity;
@Author Thomas Helfer, Jean-Michel Scherer;
@Date 16 / 03 / 2022;
@Description {
}

@ModellingHypothesis Tridimensional;
@OrthotropicBehaviour;

@Algorithm NewtonRaphson;
@Epsilon 1.e-12;
@Theta 1;

@Brick StandardElasticity{
/*
  young_modulus: 1.0,
  poisson_ratio: 0.3
*/
  young_modulus1 : 1.,
  young_modulus2 : 1.,
  young_modulus3 : 1.,
  poisson_ratio12 : 0.3,
  poisson_ratio23 : 0.3,
  poisson_ratio13 : 0.3,
  shear_modulus12 : 0.384615384615385,
  shear_modulus23 : 0.384615384615385,
  shear_modulus13 : 0.384615384615385
};

@CrystalStructure HCP;
@SlipSystems { <1,-2,1,0>{0,0,0,1} }; // 3 basal slip systems
@InteractionMatrix{1., 0.}; // self interaction + cross interaction
//@InteractionMatrix{1., 0., 0., 0., 0., 0., 0., 0.}; // self interaction + cross interaction
//@SlipSystems { <1,-2,1,0>{0,0,0,1}, <1,-2,1,0>{1,0,-1,0} }; // 3 basal + 3 prismatic slip systems

//@Parameter n = 1.; //10.0;
//@Parameter K = 1.; //25.;
//@Parameter Q = 0.; //11.43;
//@Parameter b = 0.; //2.1;
//@Parameter tau0 = 1.; //66.62;
//@Parameter d = 0.; //494.0;
//@Parameter C = 0.; //14363;

@MaterialProperty real n;
@MaterialProperty real K;
@MaterialProperty real Q;
@MaterialProperty real b;
@MaterialProperty real tau0;
@MaterialProperty real d;
@MaterialProperty real C;

//@IntegrationVariable strain g[Nss];
@StateVariable strain g[Nss];
g.setEntryName("ViscoplasticSlip");

@AuxiliaryStateVariable strain p[Nss];
p.setEntryName("EquivalentViscoplasticSlip");

@AuxiliaryStateVariable strain a[Nss];
a.setEntryName("BackStrain");

@LocalVariable strain dPsi_d;

@AuxiliaryStateVariable strain Psi_pl;
Psi_pl.setEntryName("DissipatedEnergy");

@AuxiliaryStateVariable Stensor epl;
epl.setGlossaryName("PlasticStrain");

@Parameter real kres = 1e-5;
kres.setEntryName("ResidualStiffness");

@ExternalStateVariable real damage;
damage.setGlossaryName("Damage");

@Integrator {
  using size_type = unsigned short;
  const auto& ss = HCPMericCailletaudSingleCrystalViscoPlasticitySlipSystems<real>::getSlipSystems();
  const auto& m = ss.him;
  constexpr const auto eeps = 1.e-12;
  //const auto seps = eeps * D(0, 0);
  real exp_bp[Nss];
  for (size_type i = 0; i != Nss; ++i) {
      const auto p_ = p[i] + theta * abs(dg[i]);
      exp_bp[i] = exp(-b * p_);
  }
  dPsi_d = 0.;
  epl = 0. * Stensor::Id();
  for (size_type i = 0; i != Nss; ++i) {
    const auto tau = sig | ss.mus[i];
    auto r = tau0;
    for (size_type j = 0; j != Nss; ++j) {
      r += Q * m(i, j) * (1 - exp_bp[j]);
    }
    const auto da =  //
        (dg[i] - d * a[i] * abs(dg[i])) / (1 + theta * d * abs(dg[i]));
    const auto x = C * (a[i] + theta * da);
    const auto f = max(abs(tau - x) - r, stress(0));
//    if (f > 1.1 * K) {
//cout << "FALSE" << endl;
//      return false;
//    }
    const auto sgn = tau - x > 0 ? 1 : -1;
    // elasticity
    feel += dg[i] * ss.mus[i];
    dfeel_ddg(i) = ss.mus[i];
    // viscoplasticity
    const auto v = pow(f / K, n);
    //const auto dv = n * v / (max(f, seps));
    const auto dv = lambda * (n / K) * pow(f / K, n - 1);
    fg[i] -= dt * v * sgn;
    dfg_ddeel(i) = -dt * dv * theta * (ss.mus[i] | D);
    const auto sgn_gi = dg(i) > 0 ? 1 : -1;
    const auto dda_ddg =
        (1 - d * a[i] * sgn_gi) / (power<2>(1 + theta * d * abs(dg[i])));
    dfg_ddg(i, i) += dt * dv * C * theta * dda_ddg;
    for (size_type j = 0; j != Nss; ++j) {
      const auto sgn_gj = dg(j) > 0 ? 1 : -1;
      const auto dr = Q * m(i, j) * theta * b * exp_bp[j] * sgn_gj;
      dfg_ddg(i, j) += dt * dv * dr * sgn;
    }
    dPsi_d += tau * dg[i];
    epl = g[i] * ss.mus[i];
  }
}

@UpdateAuxiliaryStateVariables {
  using size_type = unsigned short;
  for (size_type i = 0; i != Nss; ++i) {
    p[i] += abs(dg[i]);
    const auto da =  //
        (dg[i] - d * a[i] * abs(dg[i])) / (1 + theta * d * abs(dg[i]));
    a[i] += da;
  }
  const auto gd = (1-damage) * (1-damage) + kres;
  sig = gd * sig;
  Psi_pl += dPsi_d;
}

@TangentOperator{
  const auto gd = (1-damage) * (1-damage) + kres;
  Stensor4 iJe;
  getPartialJacobianInvert(iJe);
  Dt = gd * D * iJe;
}

@DissipatedEnergy{
  Psi_d += dPsi_d;
}

@InternalEnergy {
  const auto gd = (1 - damage) * (1 - damage) + kres;
  Psi_s = (0.5 / gd) * (sig | eel);
}
